@DSL Implicit;
@Behaviour test1;

@StrainMeasure Hencky;

@Epsilon 1e-14;
@Theta 1;

@Brick StandardElastoViscoPlasticity{
  stress_potential : "Hooke" {young_modulus : 200e3, poisson_ratio : 0.3},
  inelastic_flow : "Plastic" {
    criterion : "Mises",
    isotropic_hardening : "Voce" {R0 : 200., Rinf : 600., b : 5}
  }
};
